// SBML level 2 version 1

model repressilator()
  // Elowitz2000_Repressilator
  // Repressilator: A synthetic oscillatory network of transcriptional regulators
  // Citation
  // Elowitz MB, Leibler S (2000)
  // A synthetic oscillatory network of transcriptional regulators.
  // Nature.403 : 335 - 338.
  // http:// www.nature.com/cgi-taf/DynaPage.taf?file=/nature/journal/v403/n6767/full/ 403335a0_fs.html
  // Description
  // This file describes the repressilator system.
  // The authors of this model (see reference) use three transcriptional repressor systems that are not part of any natural biological clock to build an oscillating network that they called the repressilator. The model system was induced in Escherichia coli.
  // In this system, LacI (variable X is the mRNA, variable PX is the protein) inhibits the tetracycline-resistance transposon tetR (Y, PY describe mRNA and protein). Protein tetR inhibits the gene Cl from phage Lambda (Z, PZ: mRNA, protein),and protein Cl inhibits lacI expression. With appropriate parameter values this system oscillates.
  // The model is based upon the equations in Box 1 of the paper; however, these equations as printed are dimensionless, and the correct dimensions have been returned to the equations, and the parameters set to reproduce Figure 1C (left).
  // The original Model was Generated by B.E. Shapiro using Cellerator Version 1.0 update 2.1127 using Mathematica 4.2 for Mac OS X (June 4, 2002), November 27, 2002 12:15:32, using (PowerMac,PowerPC, Mac OS X,MacOSX,Darwin)
  // Nicolas Le Novere: Corrected version generated by SBMLeditor on Sun Aug 20 00:44:05 BST 2006. Size of cell set to 1; removal of EmptySet species. Ran fine on COPASI 4.0 build 18
  // Bruce Shapiro: Revised with SBML editor 23 October 2006 20:39 PST. Define default units and correct reactions. The original cellerator reactions while being mathematically correct did not accurately reflect the intent of the authors.' The original notes were mostly removed because they were mostly incorrect in the revised version. Tested with MathSBML 2.6.0
  // The remainder of this file contains SBML, a type of XML, which will not display properly in some browsers.
  // This model originates from BioModels Database: A Database of Annotated Published Models.
  // Copyright (c) 2005-2007 The BioModels Team.
  // For more information see the terms of use.
  // biomodels.net

  // Compartments:
  compartment cell = 1;

  // Species:
  substanceOnly species PX in cell = 5; PX is "Lactose operon repressor";
  substanceOnly species PY in cell = 0; PY is "Tetracycline repressor";
  substanceOnly species PZ in cell = 15; PZ is "Repressor protein CI";
  substanceOnly species X in cell = 0; X is "transcript LacI";
  substanceOnly species Y in cell = 0; Y is "transcript TetR";
  substanceOnly species Z in cell = 0; Z is "transcript CI";

  // Parameters:
  beta = 0.2; beta is "Ratio of protein to mRNA decay rates";
  alpha0 = 0.25; alpha0 is "Leakiness in protein copies per promoter";
  alpha = 250; alpha is "Protein copies per promoter";
  eff = 20; eff is "Translation efficiency, proteins per transcript";
  n = 2; n is "Hill Constant";
  KM = 40; KM is "Number of Repressors, half maximal repression";
  tau_mRNA = 2; tau_mRNA is "mRNA half life";

  // Reactions:
  degradation_of_LacI_transcripts: X => ; X/tau_mRNA;
  degradation_of_TetR_transcripts: Y => ; Y/tau_mRNA;
  degradation_of_CI_transcripts: Z => ; Z/tau_mRNA;
  translation_of_LacI: => PX; X*KM*beta/(tau_mRNA*eff);  // modifiers: X
  translation_of_TetR: => PY; Y*KM*beta/(tau_mRNA*eff);  // modifiers: Y
  translation_of_CI: => PZ; Z*KM*beta/(tau_mRNA*eff);  // modifiers: Z
  degradation_of_LacI: PX => ; PX*beta/tau_mRNA;
  degradation_of_TetR: PY => ; PY*beta/tau_mRNA;
  degradation_of_CI: PZ => ; PZ*beta/tau_mRNA;
  transcription_of_LacI: => X; alpha0*eff/tau_mRNA + alpha*eff*KM^n/(tau_mRNA*(KM^n + PZ^n));  // modifiers: PZ
  transcription_of_TetR: => Y; alpha0*eff/tau_mRNA + alpha*eff*KM^n/(tau_mRNA*(KM^n + PX^n));  // modifiers: PX
  transcription_of_CI: => Z; alpha0*eff/tau_mRNA + alpha*eff*KM^n/(tau_mRNA*(KM^n + PY^n));  // modifiers: PY

  // Unit definitions:
  unit volume = 1e-15 litre; volume is "cubic microns";
  unit substance = item; substance is "item";
  unit time = 60 second; time is "minute";
end
